// COMSOL Multiphysics 6.1.0.282 model "Cf252-source-sim.mph"
// Outline of the model tree

Parameters
  anode = 1000

Geometry
  geom1 "Geometry 1" (3D, length unit mm)
    imp1: Import
      type = cad
      filename = C:\Users\darro\Desktop\GdSource\SIM\CAD\GDSIM01.SLDASM
      faceangle = 110
      neighangle = 20
      facecurv = 10
      ignoreoffset = (-0.1)[mm]
    fin: Finalize "Form Union"

Materials
  mat2: Common "UNS C10100 (OFE) [solid,annealed]"
    def "Basic"
      resistivity = res_solid_annealed_1(T)
      thermalexpansioncoefficient = (alpha_solid_1(T)+(Tempref-293[K])*if(abs(T-Tempref)>1e-3,(alpha_solid_1(T)-alpha_solid_1(Tempref))/(T-Tempref),d(alpha_solid_1(T),T)))/(1+alpha_solid_1(Tempref)*(Tempref-293[K]))
      heatcapacity = C_solid_1(T)
      electricconductivity = sigma_solid_annealed_1(T)
      density = rho_solid_1(T)
      res_solid_annealed_1: Piecewise | arg = T; pieces = {280.0, 740.0, 6.28349724E-9+7.11105389E-12*T^1+1.81368427E-13*T^2-3.10429447E-16*T^3+2.20371419E-19*T^4}; argunit = K; fununit = ohm*m
      alpha_solid_1: Piecewise
        arg = T
        pieces = 
          {4.0, 100.0, 1.104402E-5+4.812192E-8*T^1-1.223083E-10*T^2}
          {100.0, 210.0, 1.276495E-5+1.849516E-8*T^1+1.203963E-11*T^2-1.023671E-13*T^3}
          {210.0, 800.0, 1.47252E-5+8.137386E-9*T^1-4.58414E-12*T^2}
          {800.0, 1273.16, 1.83456E-5-1.577095E-9*T^1+1.908643E-12*T^2}
        argunit = K
        fununit = 1/K
      C_solid_1: Piecewise
        arg = T
        pieces = 
          {1.0, 17.5, 0.00816805501+0.00104457033*T^1+0.00344121866*T^2+2.84703334E-4*T^3+2.24642893E-5*T^4}
          {17.5, 62.0, 29.059721-3.76716858*T^1+0.154053918*T^2-0.00104836396*T^3+3.01020641E-7*T^4}
          {62.0, 300.0, -215.281402+8.23639228*T^1-0.0473210818*T^2+1.29111169E-4*T^3-1.35703145E-7*T^4}
          {300.0, 1300.0, 342.764033+0.133834821*T^1+5.53525209E-5*T^2-1.97122089E-7*T^3+1.1407471E-10*T^4}
        argunit = K
        fununit = J/(kg*K)
      sigma_solid_annealed_1: Piecewise | arg = T; pieces = {280.0, 740.0, 1/(2.20371419E-19*T^4-3.10429447E-16*T^3+1.81368427E-13*T^2+7.11105389E-12*T+6.28349724E-09)}; argunit = K; fununit = S/m
      rho_solid_1: Piecewise
        arg = T
        pieces = 
          {4.0, 90.0, 9028.155+0.001936185*T^1-4.310034E-4*T^2-8.227902E-6*T^3}
          {90.0, 250.0, 9034.264-0.05885933*T^1-0.001406238*T^2+1.736657E-6*T^3}
          {250.0, 800.0, 9062.242-0.3913962*T^1-8.947644E-5*T^2}
          {800.0, 1273.16, 9038.962-0.3593546*T^1-9.31574E-5*T^2}
        argunit = K
        fununit = kg/m^3
    ThermalExpansion
      alphatan = CTE_solid_1(T)
      dL = (dL_solid_1(T)-dL_solid_1(Tempref))/(1+dL_solid_1(Tempref))
      dL_solid_1: Piecewise
        arg = T
        pieces = 
          {4.0, 80.0, -0.003272586-6.837087E-8*T^1+1.574823E-8*T^2+3.040518E-10*T^3}
          {80.0, 250.0, -0.003491523+2.12144E-6*T^1+5.197613E-8*T^2-6.339761E-11*T^3}
          {250.0, 800.0, -0.004355177+1.293125E-5*T^1+7.341229E-9*T^2-2.541027E-12*T^3}
          {800.0, 1273.16, -0.004359242+1.427188E-5*T^1+3.639858E-9*T^2}
        argunit = K
      CTE_solid_1: Piecewise
        arg = T
        pieces = 
          {4.0, 13.0, -8.574809E-9+4.13567E-9*T^1-5.673583E-10*T^2+5.520915E-11*T^3}
          {13.0, 60.0, 2.194122E-7-2.662325E-8*T^1+4.800942E-10*T^2+6.093443E-11*T^3-6.195564E-13*T^4}
          {60.0, 250.0, -8.81E-6+3.292355E-7*T^1-1.773823E-9*T^2+4.545667E-12*T^3-4.483983E-15*T^4}
          {250.0, 800.0, 1.104756E-5+2.743089E-8*T^1-3.159431E-11*T^2+1.370433E-14*T^3}
        argunit = K
        fununit = 1/K
    Enu "Young's modulus and Poisson's ratio"
      E = E(T)
      nu = nu(T)
      E: Piecewise | arg = T; pieces = {4.0, 1330.0, 1.396274E11-5077626.0*T^1-191131.5*T^2+290.7333*T^3-0.2058552*T^4+5.385261E-5*T^5}; argunit = K; fununit = Pa
      nu: Piecewise
        arg = T
        pieces = 
          {4.0, 20.0, 0.3413951-9.643661E-5*T^1+2.151898E-6*T^2}
          {20.0, 1330.0, 0.339846+2.405498E-5*T^1}
        argunit = K
    KG "Bulk modulus and shear modulus"
      K = kappa(T)
      G = mu(T)
      mu: Piecewise | arg = T; pieces = {4.0, 1330.0, 5.208306E10-2585817.0*T^1-71978.63*T^2+110.2355*T^3-0.07807297*T^4+2.043615E-5*T^5}; argunit = K; fununit = Pa
      kappa: Piecewise | arg = T; pieces = {4.0, 1330.0, 1.459784E11+4948257.0*T^1-132451.5*T^2+114.0737*T^3+0.02475104*T^4-9.178407E-5*T^5+3.51125E-8*T^6}; argunit = K; fununit = Pa
  mat1: Common "304L [solid,polished]"
    def "Basic"
      thermalconductivity = k(T)
      resistivity = res(T)
      thermalexpansioncoefficient = (alpha(T)+(Tempref-293[K])*if(abs(T-Tempref)>1e-3,(alpha(T)-alpha(Tempref))/(T-Tempref),d(alpha(T),T)))/(1+alpha(Tempref)*(Tempref-293[K]))
      heatcapacity = C(T)
      electricconductivity = sigma(T)
      emissivity = epsilon_solid_polished_1(T)
      density = rho(T)
      TD = TD(T)
      k: Piecewise
        arg = T
        pieces = 
          {1.0, 45.0, -0.0374087067+0.064605459*T^1+0.00372060353*T^2-8.39006656E-5*T^3+6.00659387E-7*T^4}
          {45.0, 283.0, -1.03044566+0.181380661*T^1-0.00108865619*T^2+3.41168102E-6*T^3-3.98838914E-9*T^4}
          {283.0, 887.0, -1.25819153+0.10239449*T^1-2.18954702E-4*T^2+2.31293125E-7*T^3-8.90393698E-11*T^4}
        argunit = K
        fununit = W/(m*K)
      res: Piecewise
        arg = T
        pieces = 
          {1.0, 10.0, 4.85E-7}
          {10.0, 273.0, 4.915758E-7-8.103548E-10*T^1+1.582349E-11*T^2-5.524795E-14*T^3+6.640058E-17*T^4}
          {273.0, 1672.0, 4.15904E-7+1.170541E-9*T^1-5.839381E-13*T^2+1.201886E-16*T^3}
        argunit = K
        fununit = ohm*m
      alpha: Piecewise
        arg = T
        pieces = 
          {4.0, 249.0, 1.01724651E-5+4.39075646E-8*T^1-9.80029192E-11*T^2-9.63748329E-14*T^3+4.33311395E-16*T^4}
          {249.0, 1700.0, 1.35671273E-5+6.94562192E-9*T^1-1.44470823E-12*T^2}
        argunit = K
        fununit = 1/K
      C: Piecewise
        arg = T
        pieces = 
          {4.0, 14.0, 4.80350032-1.97398843*T^1+0.433444597*T^2-0.0314324745*T^3+8.32403411E-4*T^4}
          {14.0, 47.0, -0.224966245+0.760568524*T^1-0.0400750739*T^2+0.00218176056*T^3-1.83602379E-5*T^4}
          {47.0, 128.0, 8.99678332-2.90098671*T^1+0.147079314*T^2-0.00125489689*T^3+3.41401138E-6*T^4}
          {128.0, 310.0, 270.275638-1.21051132*T^1+0.0215156656*T^2-7.51184272E-5*T^3+8.13679777E-8*T^4}
          {310.0, 1311.0, 110.546842+2.57177519*T^1-0.00652809772*T^2+7.78752632E-6*T^3-4.16791239E-9*T^4+8.09061477E-13*T^5}
        argunit = K
        fununit = J/(kg*K)
      sigma: Piecewise
        arg = T
        pieces = 
          {1.0, 10.0, 1/(4.850000E-07)}
          {10.0, 273.0, 1/(6.640058E-17*T^4-5.524795E-14*T^3+1.582349E-11*T^2-8.103548E-10*T+4.915758E-07)}
          {273.0, 1672.0, 1/(1.201886E-16*T^3-5.839381E-13*T^2+1.170541E-09*T+4.159040E-07)}
        argunit = K
        fununit = S/m
      epsilon_solid_polished_1: Piecewise | arg = T; pieces = {340.0, 1100.0, 0.03942897+2.131191E-4*T^1-6.420526E-8*T^2}; argunit = K
      rho: Piecewise
        arg = T
        pieces = 
          {4.0, 93.0, 7931.49847+0.033002981*T^1-9.66358107E-4*T^2-2.91717842E-6*T^3}
          {93.0, 1700.0, 7945.33324-0.198194765*T^1-3.71376398E-4*T^2+2.21306888E-7*T^3-5.12845625E-11*T^4}
        argunit = K
        fununit = kg/m^3
      TD: Piecewise
        arg = T
        pieces = 
          {4.0, 18.0, -5.28654694E-5+4.09332281E-5*T^1-9.14302925E-6*T^2+1.04528027E-6*T^3-6.42266987E-8*T^4+2.01793627E-9*T^5-2.54952135E-11*T^6}
          {18.0, 59.0, -7.54526888E-6+5.88838191E-6*T^1-4.13562967E-7*T^2+1.3148507E-8*T^3-2.21601854E-10*T^4+1.9288479E-12*T^5-6.83429033E-15*T^6}
          {59.0, 270.0, 2.48996698E-5-6.63595143E-7*T^1+8.68831422E-9*T^2-5.97091653E-11*T^3+2.25626473E-13*T^4-4.43690638E-16*T^5+3.55366099E-19*T^6}
          {270.0, 700.0, 1.22240552E-6+1.83069438E-8*T^1-4.28843727E-11*T^2+5.30245791E-14*T^3-2.4646769E-17*T^4}
          {700.0, 1273.16, 3.11843796E-6+5.30637833E-9*T^1-4.1891966E-12*T^2+1.49699269E-15*T^3}
        argunit = K
        fununit = m^2/s
    ThermalExpansion
      alphatan = CTE(T)
      dL = (dL(T)-dL(Tempref))/(1+dL(Tempref))
      dL: Piecewise
        arg = T
        pieces = 
          {4.0, 23.0, -0.00300113254}
          {23.0, 293.0, -0.00295624992-3.97680879E-6*T^1+9.26213039E-8*T^2-2.02210171E-10*T^3+1.70075125E-13*T^4+1.33913695E-18*T^5}
          {293.0, 1700.0, -0.00425071616+1.28810814E-5*T^1+5.82893807E-9*T^2-9.48136557E-13*T^3}
        argunit = K
      CTE: Piecewise
        arg = T
        pieces = 
          {10.0, 60.0, -4.05E-7+2.2625E-8*T^1-3.64791667E-9*T^2+1.275E-10*T^3-8.95833333E-13*T^4}
          {60.0, 200.0, -9.79922077E-6+3.00320346E-7*T^1-1.38712121E-9*T^2+2.42424242E-12*T^3}
          {200.0, 300.0, 4.62409474E-6+6.55279506E-8*T^1-8.88936368E-11*T^2}
        argunit = K
        fununit = 1/K
    Enu "Young's modulus and Poisson's ratio"
      E = E(T)
      nu = nu(T)
      E: Piecewise
        arg = T
        pieces = 
          {5.0, 60.0, 2.078364E11+7.414909E7*T^1}
          {60.0, 295.0, 2.077579E11+1.570552E8*T^1-1651323.0*T^2+5296.944*T^3-6.38774*T^4}
          {295.0, 1173.16, 2.242833E11-8.92503E7*T^1}
        argunit = K
        fununit = Pa
      nu: Piecewise
        arg = T
        pieces = 
          {5.0, 60.0, 0.2797496-4.402647E-5*T^1}
          {60.0, 295.0, 0.2752731+2.459471E-5*T^1+1.356199E-7*T^2-1.850087E-10*T^3}
          {295.0, 1173.16, 0.2652448+8.224213E-5*T^1}
        argunit = K
    KG "Bulk modulus and shear modulus"
      K = kappa(T)
      G = mu(T)
      mu: Piecewise
        arg = T
        pieces = 
          {5.0, 60.0, 8.006021E10+3.177818E7*T^1}
          {60.0, 295.0, 8.029302E10+6.039092E7*T^1-659731.6*T^2+2106.197*T^3-2.525896*T^4}
          {295.0, 1173.16, 8.670748E10-3.756766E7*T^1}
        argunit = K
        fununit = Pa
      kappa: Piecewise | arg = T; pieces = {293.0, 870.0, 1.727914E11-5205743.0*T^1}; argunit = K; fununit = Pa
  mat3: Common "6061 [solid,T6 temper]"
    def "Basic"
      thermalconductivity = k_solid_T6_temper_1(T)
      resistivity = res(T)
      thermalexpansioncoefficient = (alpha(T)+(Tempref-293[K])*if(abs(T-Tempref)>1e-3,(alpha(T)-alpha(Tempref))/(T-Tempref),d(alpha(T),T)))/(1+alpha(Tempref)*(Tempref-293[K]))
      heatcapacity = C(T)
      electricconductivity = sigma(T)
      density = rho(T)
      TD = TD(T)
      k_solid_T6_temper_1: Piecewise
        arg = T
        pieces = 
          {4.0, 130.0, -1.35437+1.660905*T^1-0.008948206*T^2+2.250241E-5*T^3}
          {130.0, 300.0, 30.71577+0.8750948*T^1-0.002142331*T^2+2.05104E-6*T^3}
          {300.0, 811.0, 79.478+0.3355001*T^1-2.701638E-4*T^2}
        argunit = K
        fununit = W/(m*K)
      res: Piecewise
        arg = T
        pieces = 
          {4.0, 19.7, 1.379978E-8+2.555911E-12*T^1}
          {19.7, 293.0, 1.390705E-8-1.842119E-11*T^1+8.191974E-13*T^2-1.50061E-15*T^3}
        argunit = K
        fununit = ohm*m
      alpha: Piecewise
        arg = T
        pieces = 
          {22.0, 88.0, 1.3648E-5+5.61487E-8*T^1+7.71396E-11*T^2-9.540526E-13*T^3}
          {88.0, 588.0, 1.316461E-5+8.302515E-8*T^1-2.909984E-10*T^2+4.99184E-13*T^3-3.127291E-16*T^4}
        argunit = K
        fununit = 1/K
      C: Piecewise
        arg = T
        pieces = 
          {4.0, 30.0, -1.17115557+0.487569051*T^1-0.0443149197*T^2+0.00232206728*T^3-3.42445087E-6*T^4}
          {30.0, 47.0, 26.582634-1.95690617*T^1+0.00352123139*T^2+0.00324321212*T^3-3.10753881E-5*T^4}
          {47.0, 130.0, -75.1821286-1.13922203*T^1+0.176562541*T^2-0.00147785574*T^3+3.9391632E-6*T^4}
          {130.0, 145.0, -264.783185+9.29321629*T^1-0.0121044208*T^2-6.74100976E-5*T^3+1.6547628E-7*T^4}
          {145.0, 811.0, -5.60596587+6.74472515*T^1-0.0153591209*T^2+1.61975861E-5*T^3-6.21481318E-9*T^4}
        argunit = K
        fununit = J/(kg*K)
      sigma: Piecewise
        arg = T
        pieces = 
          {4.0, 19.7, 1/(2.555911E-12*T+1.379978E-08)}
          {19.7, 293.0, 1/(-1.500610E-15*T^3+8.191974E-13*T^2-1.842119E-11*T+1.390705E-08)}
        argunit = K
        fununit = S/m
      rho: Piecewise
        arg = T
        pieces = 
          {22.0, 88.0, 2733.392-0.04347255*T^1+0.001455455*T^2-2.077034E-5*T^3+7.111E-8*T^4}
          {88.0, 588.0, 2736.099-0.009406248*T^1-6.040342E-4*T^2+8.988964E-7*T^3-5.405225E-10*T^4}
        argunit = K
        fununit = kg/m^3
      TD: Piecewise
        arg = T
        pieces = 
          {20.0, 56.0, 0.008936926-8.204512E-4*T^1+3.204977E-5*T^2-6.428844E-7*T^3+6.522072E-9*T^4-2.653113E-11*T^5}
          {56.0, 135.0, 0.001241242-5.079258E-5*T^1+9.0397E-7*T^2-8.106985E-9*T^3+3.617656E-11*T^4-6.389535E-14*T^5}
          {135.0, 355.0, 1.539249E-4-1.724476E-6*T^1+1.312367E-8*T^2-5.122993E-11*T^3+9.965819E-14*T^4-7.622354E-17*T^5}
          {355.0, 588.0, 8.3013E-5-2.384898E-7*T^1+7.399833E-10*T^2-9.130456E-13*T^3+3.753774E-16*T^4}
        argunit = K
        fununit = m^2/s
    ThermalExpansion
      alphatan = CTE(T)
      dL = (dL(T)-dL(Tempref))/(1+dL(Tempref))
      dL: Piecewise
        arg = T
        pieces = 
          {22.0, 88.0, -0.004101768+5.279196E-6*T^1-1.767226E-7*T^2+2.521432E-9*T^3-8.625342E-12*T^4}
          {88.0, 588.0, -0.00440008765+1.079286E-6*T^1+7.353025E-8*T^2-1.076827E-10*T^3+6.512613E-14*T^4}
        argunit = K
      CTE: Piecewise
        arg = T
        pieces = 
          {0.0, 88.0, 1.243641E-8+3.085851E-8*T^1-1.105852E-9*T^2+4.454763E-11*T^3-2.444182E-13*T^4}
          {88.0, 283.0, -2.17214E-5+6.01631E-7*T^1-3.560537E-9*T^2+1.007751E-11*T^3-1.087698E-14*T^4}
          {283.0, 573.16, 1.542521E-5+2.593871E-8*T^1-9.271321E-12*T^2}
        argunit = K
        fununit = 1/K
    Enu "Young's modulus and Poisson's ratio"
      E = E(T)
      nu = nu(T)
      E: Piecewise | arg = T; pieces = {0.0, 773.0, 7.659324E10+2007396.0*T^1-186458.4*T^2+419.2175*T^3-0.3495083*T^4}; argunit = K; fununit = Pa
      nu: Piecewise | arg = T; pieces = {0.0, 773.0, 0.3238668+3.754548E-6*T^1+2.213647E-7*T^2-6.565023E-10*T^3+4.21277E-13*T^4+3.170505E-16*T^5}; argunit = K
    KG "Bulk modulus and shear modulus"
      K = kappa(T)
      G = mu(T)
      mu: Piecewise | arg = T; pieces = {0.0, 773.0, 2.894653E10-120032.4*T^1-69037.36*T^2+158.6722*T^3-0.1348974*T^4}; argunit = K; fununit = Pa
      kappa: Piecewise | arg = T; pieces = {0.0, 773.0, 7.252413E10+1872882.0*T^1-71106.44*T^2+52.7109*T^3}; argunit = K; fununit = Pa
  mat4: Common "304L [solid,polished]" on domains 1, 2, 4, 6
    def "Basic"
      thermalconductivity = k(T)
      resistivity = res(T)
      thermalexpansioncoefficient = (alpha(T)+(Tempref-293[K])*if(abs(T-Tempref)>1e-3,(alpha(T)-alpha(Tempref))/(T-Tempref),d(alpha(T),T)))/(1+alpha(Tempref)*(Tempref-293[K]))
      heatcapacity = C(T)
      electricconductivity = sigma(T)
      emissivity = epsilon_solid_polished_1(T)
      density = rho(T)
      TD = TD(T)
      relpermittivity = 1E9
      k: Piecewise
        arg = T
        pieces = 
          {1.0, 45.0, -0.0374087067+0.064605459*T^1+0.00372060353*T^2-8.39006656E-5*T^3+6.00659387E-7*T^4}
          {45.0, 283.0, -1.03044566+0.181380661*T^1-0.00108865619*T^2+3.41168102E-6*T^3-3.98838914E-9*T^4}
          {283.0, 887.0, -1.25819153+0.10239449*T^1-2.18954702E-4*T^2+2.31293125E-7*T^3-8.90393698E-11*T^4}
        argunit = K
        fununit = W/(m*K)
      res: Piecewise
        arg = T
        pieces = 
          {1.0, 10.0, 4.85E-7}
          {10.0, 273.0, 4.915758E-7-8.103548E-10*T^1+1.582349E-11*T^2-5.524795E-14*T^3+6.640058E-17*T^4}
          {273.0, 1672.0, 4.15904E-7+1.170541E-9*T^1-5.839381E-13*T^2+1.201886E-16*T^3}
        argunit = K
        fununit = ohm*m
      alpha: Piecewise
        arg = T
        pieces = 
          {4.0, 249.0, 1.01724651E-5+4.39075646E-8*T^1-9.80029192E-11*T^2-9.63748329E-14*T^3+4.33311395E-16*T^4}
          {249.0, 1700.0, 1.35671273E-5+6.94562192E-9*T^1-1.44470823E-12*T^2}
        argunit = K
        fununit = 1/K
      C: Piecewise
        arg = T
        pieces = 
          {4.0, 14.0, 4.80350032-1.97398843*T^1+0.433444597*T^2-0.0314324745*T^3+8.32403411E-4*T^4}
          {14.0, 47.0, -0.224966245+0.760568524*T^1-0.0400750739*T^2+0.00218176056*T^3-1.83602379E-5*T^4}
          {47.0, 128.0, 8.99678332-2.90098671*T^1+0.147079314*T^2-0.00125489689*T^3+3.41401138E-6*T^4}
          {128.0, 310.0, 270.275638-1.21051132*T^1+0.0215156656*T^2-7.51184272E-5*T^3+8.13679777E-8*T^4}
          {310.0, 1311.0, 110.546842+2.57177519*T^1-0.00652809772*T^2+7.78752632E-6*T^3-4.16791239E-9*T^4+8.09061477E-13*T^5}
        argunit = K
        fununit = J/(kg*K)
      sigma: Piecewise
        arg = T
        pieces = 
          {1.0, 10.0, 1/(4.850000E-07)}
          {10.0, 273.0, 1/(6.640058E-17*T^4-5.524795E-14*T^3+1.582349E-11*T^2-8.103548E-10*T+4.915758E-07)}
          {273.0, 1672.0, 1/(1.201886E-16*T^3-5.839381E-13*T^2+1.170541E-09*T+4.159040E-07)}
        argunit = K
        fununit = S/m
      epsilon_solid_polished_1: Piecewise | arg = T; pieces = {340.0, 1100.0, 0.03942897+2.131191E-4*T^1-6.420526E-8*T^2}; argunit = K
      rho: Piecewise
        arg = T
        pieces = 
          {4.0, 93.0, 7931.49847+0.033002981*T^1-9.66358107E-4*T^2-2.91717842E-6*T^3}
          {93.0, 1700.0, 7945.33324-0.198194765*T^1-3.71376398E-4*T^2+2.21306888E-7*T^3-5.12845625E-11*T^4}
        argunit = K
        fununit = kg/m^3
      TD: Piecewise
        arg = T
        pieces = 
          {4.0, 18.0, -5.28654694E-5+4.09332281E-5*T^1-9.14302925E-6*T^2+1.04528027E-6*T^3-6.42266987E-8*T^4+2.01793627E-9*T^5-2.54952135E-11*T^6}
          {18.0, 59.0, -7.54526888E-6+5.88838191E-6*T^1-4.13562967E-7*T^2+1.3148507E-8*T^3-2.21601854E-10*T^4+1.9288479E-12*T^5-6.83429033E-15*T^6}
          {59.0, 270.0, 2.48996698E-5-6.63595143E-7*T^1+8.68831422E-9*T^2-5.97091653E-11*T^3+2.25626473E-13*T^4-4.43690638E-16*T^5+3.55366099E-19*T^6}
          {270.0, 700.0, 1.22240552E-6+1.83069438E-8*T^1-4.28843727E-11*T^2+5.30245791E-14*T^3-2.4646769E-17*T^4}
          {700.0, 1273.16, 3.11843796E-6+5.30637833E-9*T^1-4.1891966E-12*T^2+1.49699269E-15*T^3}
        argunit = K
        fununit = m^2/s
    ThermalExpansion
      alphatan = CTE(T)
      dL = (dL(T)-dL(Tempref))/(1+dL(Tempref))
      dL: Piecewise
        arg = T
        pieces = 
          {4.0, 23.0, -0.00300113254}
          {23.0, 293.0, -0.00295624992-3.97680879E-6*T^1+9.26213039E-8*T^2-2.02210171E-10*T^3+1.70075125E-13*T^4+1.33913695E-18*T^5}
          {293.0, 1700.0, -0.00425071616+1.28810814E-5*T^1+5.82893807E-9*T^2-9.48136557E-13*T^3}
        argunit = K
      CTE: Piecewise
        arg = T
        pieces = 
          {10.0, 60.0, -4.05E-7+2.2625E-8*T^1-3.64791667E-9*T^2+1.275E-10*T^3-8.95833333E-13*T^4}
          {60.0, 200.0, -9.79922077E-6+3.00320346E-7*T^1-1.38712121E-9*T^2+2.42424242E-12*T^3}
          {200.0, 300.0, 4.62409474E-6+6.55279506E-8*T^1-8.88936368E-11*T^2}
        argunit = K
        fununit = 1/K
    Enu "Young's modulus and Poisson's ratio"
      E = E(T)
      nu = nu(T)
      E: Piecewise
        arg = T
        pieces = 
          {5.0, 60.0, 2.078364E11+7.414909E7*T^1}
          {60.0, 295.0, 2.077579E11+1.570552E8*T^1-1651323.0*T^2+5296.944*T^3-6.38774*T^4}
          {295.0, 1173.16, 2.242833E11-8.92503E7*T^1}
        argunit = K
        fununit = Pa
      nu: Piecewise
        arg = T
        pieces = 
          {5.0, 60.0, 0.2797496-4.402647E-5*T^1}
          {60.0, 295.0, 0.2752731+2.459471E-5*T^1+1.356199E-7*T^2-1.850087E-10*T^3}
          {295.0, 1173.16, 0.2652448+8.224213E-5*T^1}
        argunit = K
    KG "Bulk modulus and shear modulus"
      K = kappa(T)
      G = mu(T)
      mu: Piecewise
        arg = T
        pieces = 
          {5.0, 60.0, 8.006021E10+3.177818E7*T^1}
          {60.0, 295.0, 8.029302E10+6.039092E7*T^1-659731.6*T^2+2106.197*T^3-2.525896*T^4}
          {295.0, 1173.16, 8.670748E10-3.756766E7*T^1}
        argunit = K
        fununit = Pa
      kappa: Piecewise | arg = T; pieces = {293.0, 870.0, 1.727914E11-5205743.0*T^1}; argunit = K; fununit = Pa
  mat5: Common "Xenon [gas]"
    def "Basic"
      thermalconductivity = k_gas_3(T)
      heatcapacity = C(T)
      HC = HC(T)
      density = rho_gas_2(T)
      TD = TD(T)
      dynamicviscosity = eta(T)
      k_gas_3: Piecewise | arg = T; pieces = {165.0, 1500.0, -5.289054E-5+2.076528E-5*T^1-5.673317E-9*T^2+1.044681E-12*T^3}; argunit = K; fununit = W/(m*K)
      C: Piecewise
        arg = T
        pieces = 
          {100.0, 6800.0, 158.304778}
          {6800.0, 9750.0, 218.350324-0.0165852714*T^1+1.14096216E-6*T^2}
          {9750.0, 14500.0, -2712.79389+1.01010881*T^1-1.30212565E-4*T^2+7.15972356E-9*T^3-1.35916654E-13*T^4}
          {14500.0, 20000.0, -34543.1584+11.6700546*T^1-0.00154715534*T^2+1.00465622E-7*T^3-3.17396483E-12*T^4+3.90282139E-17*T^5}
        argunit = K
        fununit = J/(kg*K)
      HC: Piecewise
        arg = T
        pieces = 
          {100.0, 6800.0, 20.7854175}
          {6800.0, 9750.0, 28.6693956-0.00217764648*T^1+1.49808329E-7*T^2}
          {9750.0, 14500.0, -356.189861+0.132627319*T^1-1.70969077E-5*T^2+9.40071998E-10*T^3-1.78458562E-14*T^4}
          {14500.0, 20000.0, -4535.51876+1.53227787*T^1-2.03141484E-4*T^2+1.31911353E-8*T^3-4.16741588E-13*T^4+5.12440421E-18*T^5}
        argunit = K
        fununit = J/(mol*K)
      rho_gas_2: Piecewise | arg = T; pieces = {165.0, 3000.0, 1609.062*T^-1}; argunit = K; fununit = kg/m^3
      TD: Piecewise
        arg = T
        pieces = 
          {50.0, 313.0, -4.169213E-8+2.190184E-9*T^1+4.589194E-11*T^2+6.26651E-14*T^3-8.286727E-17*T^4}
          {313.0, 3273.16, -1.711181E-6+9.186519E-9*T^1+5.479939E-11*T^2-9.009597E-15*T^3+9.502876E-19*T^4}
        argunit = K
        fununit = m^2/s
      eta: Piecewise
        arg = T
        pieces = 
          {50.0, 313.0, 7.899186E-7+8.675815E-8*T^1-1.761835E-10*T^2+7.189847E-13*T^3-8.895355E-16*T^4}
          {313.0, 3273.16, -2.35601E-6+9.510836E-8*T^1-3.583807E-11*T^2+9.891332E-15*T^3-1.081838E-18*T^4}
        argunit = K
        fununit = Pa*s
  mat6: Common "Xenon [gas]" on domains 5
    def "Basic"
      thermalconductivity = k_gas_3(T)
      heatcapacity = C(T)
      HC = HC(T)
      density = rho_gas_2(T)
      TD = TD(T)
      dynamicviscosity = eta(T)
      relpermittivity = 1
      k_gas_3: Piecewise | arg = T; pieces = {165.0, 1500.0, -5.289054E-5+2.076528E-5*T^1-5.673317E-9*T^2+1.044681E-12*T^3}; argunit = K; fununit = W/(m*K)
      C: Piecewise
        arg = T
        pieces = 
          {100.0, 6800.0, 158.304778}
          {6800.0, 9750.0, 218.350324-0.0165852714*T^1+1.14096216E-6*T^2}
          {9750.0, 14500.0, -2712.79389+1.01010881*T^1-1.30212565E-4*T^2+7.15972356E-9*T^3-1.35916654E-13*T^4}
          {14500.0, 20000.0, -34543.1584+11.6700546*T^1-0.00154715534*T^2+1.00465622E-7*T^3-3.17396483E-12*T^4+3.90282139E-17*T^5}
        argunit = K
        fununit = J/(kg*K)
      HC: Piecewise
        arg = T
        pieces = 
          {100.0, 6800.0, 20.7854175}
          {6800.0, 9750.0, 28.6693956-0.00217764648*T^1+1.49808329E-7*T^2}
          {9750.0, 14500.0, -356.189861+0.132627319*T^1-1.70969077E-5*T^2+9.40071998E-10*T^3-1.78458562E-14*T^4}
          {14500.0, 20000.0, -4535.51876+1.53227787*T^1-2.03141484E-4*T^2+1.31911353E-8*T^3-4.16741588E-13*T^4+5.12440421E-18*T^5}
        argunit = K
        fununit = J/(mol*K)
      rho_gas_2: Piecewise | arg = T; pieces = {165.0, 3000.0, 1609.062*T^-1}; argunit = K; fununit = kg/m^3
      TD: Piecewise
        arg = T
        pieces = 
          {50.0, 313.0, -4.169213E-8+2.190184E-9*T^1+4.589194E-11*T^2+6.26651E-14*T^3-8.286727E-17*T^4}
          {313.0, 3273.16, -1.711181E-6+9.186519E-9*T^1+5.479939E-11*T^2-9.009597E-15*T^3+9.502876E-19*T^4}
        argunit = K
        fununit = m^2/s
      eta: Piecewise
        arg = T
        pieces = 
          {50.0, 313.0, 7.899186E-7+8.675815E-8*T^1-1.761835E-10*T^2+7.189847E-13*T^3-8.895355E-16*T^4}
          {313.0, 3273.16, -2.35601E-6+9.510836E-8*T^1-3.583807E-11*T^2+9.891332E-15*T^3-1.081838E-18*T^4}
        argunit = K
        fununit = Pa*s
  mat7: Common "UNS C10100 (OFE) [solid,annealed]" on domains 7
    def "Basic"
      resistivity = res_solid_annealed_1(T)
      thermalexpansioncoefficient = (alpha_solid_1(T)+(Tempref-293[K])*if(abs(T-Tempref)>1e-3,(alpha_solid_1(T)-alpha_solid_1(Tempref))/(T-Tempref),d(alpha_solid_1(T),T)))/(1+alpha_solid_1(Tempref)*(Tempref-293[K]))
      heatcapacity = C_solid_1(T)
      electricconductivity = sigma_solid_annealed_1(T)
      density = rho_solid_1(T)
      relpermittivity = 1E9
      res_solid_annealed_1: Piecewise | arg = T; pieces = {280.0, 740.0, 6.28349724E-9+7.11105389E-12*T^1+1.81368427E-13*T^2-3.10429447E-16*T^3+2.20371419E-19*T^4}; argunit = K; fununit = ohm*m
      alpha_solid_1: Piecewise
        arg = T
        pieces = 
          {4.0, 100.0, 1.104402E-5+4.812192E-8*T^1-1.223083E-10*T^2}
          {100.0, 210.0, 1.276495E-5+1.849516E-8*T^1+1.203963E-11*T^2-1.023671E-13*T^3}
          {210.0, 800.0, 1.47252E-5+8.137386E-9*T^1-4.58414E-12*T^2}
          {800.0, 1273.16, 1.83456E-5-1.577095E-9*T^1+1.908643E-12*T^2}
        argunit = K
        fununit = 1/K
      C_solid_1: Piecewise
        arg = T
        pieces = 
          {1.0, 17.5, 0.00816805501+0.00104457033*T^1+0.00344121866*T^2+2.84703334E-4*T^3+2.24642893E-5*T^4}
          {17.5, 62.0, 29.059721-3.76716858*T^1+0.154053918*T^2-0.00104836396*T^3+3.01020641E-7*T^4}
          {62.0, 300.0, -215.281402+8.23639228*T^1-0.0473210818*T^2+1.29111169E-4*T^3-1.35703145E-7*T^4}
          {300.0, 1300.0, 342.764033+0.133834821*T^1+5.53525209E-5*T^2-1.97122089E-7*T^3+1.1407471E-10*T^4}
        argunit = K
        fununit = J/(kg*K)
      sigma_solid_annealed_1: Piecewise | arg = T; pieces = {280.0, 740.0, 1/(2.20371419E-19*T^4-3.10429447E-16*T^3+1.81368427E-13*T^2+7.11105389E-12*T+6.28349724E-09)}; argunit = K; fununit = S/m
      rho_solid_1: Piecewise
        arg = T
        pieces = 
          {4.0, 90.0, 9028.155+0.001936185*T^1-4.310034E-4*T^2-8.227902E-6*T^3}
          {90.0, 250.0, 9034.264-0.05885933*T^1-0.001406238*T^2+1.736657E-6*T^3}
          {250.0, 800.0, 9062.242-0.3913962*T^1-8.947644E-5*T^2}
          {800.0, 1273.16, 9038.962-0.3593546*T^1-9.31574E-5*T^2}
        argunit = K
        fununit = kg/m^3
    ThermalExpansion
      alphatan = CTE_solid_1(T)
      dL = (dL_solid_1(T)-dL_solid_1(Tempref))/(1+dL_solid_1(Tempref))
      dL_solid_1: Piecewise
        arg = T
        pieces = 
          {4.0, 80.0, -0.003272586-6.837087E-8*T^1+1.574823E-8*T^2+3.040518E-10*T^3}
          {80.0, 250.0, -0.003491523+2.12144E-6*T^1+5.197613E-8*T^2-6.339761E-11*T^3}
          {250.0, 800.0, -0.004355177+1.293125E-5*T^1+7.341229E-9*T^2-2.541027E-12*T^3}
          {800.0, 1273.16, -0.004359242+1.427188E-5*T^1+3.639858E-9*T^2}
        argunit = K
      CTE_solid_1: Piecewise
        arg = T
        pieces = 
          {4.0, 13.0, -8.574809E-9+4.13567E-9*T^1-5.673583E-10*T^2+5.520915E-11*T^3}
          {13.0, 60.0, 2.194122E-7-2.662325E-8*T^1+4.800942E-10*T^2+6.093443E-11*T^3-6.195564E-13*T^4}
          {60.0, 250.0, -8.81E-6+3.292355E-7*T^1-1.773823E-9*T^2+4.545667E-12*T^3-4.483983E-15*T^4}
          {250.0, 800.0, 1.104756E-5+2.743089E-8*T^1-3.159431E-11*T^2+1.370433E-14*T^3}
        argunit = K
        fununit = 1/K
    Enu "Young's modulus and Poisson's ratio"
      E = E(T)
      nu = nu(T)
      E: Piecewise | arg = T; pieces = {4.0, 1330.0, 1.396274E11-5077626.0*T^1-191131.5*T^2+290.7333*T^3-0.2058552*T^4+5.385261E-5*T^5}; argunit = K; fununit = Pa
      nu: Piecewise
        arg = T
        pieces = 
          {4.0, 20.0, 0.3413951-9.643661E-5*T^1+2.151898E-6*T^2}
          {20.0, 1330.0, 0.339846+2.405498E-5*T^1}
        argunit = K
    KG "Bulk modulus and shear modulus"
      K = kappa(T)
      G = mu(T)
      mu: Piecewise | arg = T; pieces = {4.0, 1330.0, 5.208306E10-2585817.0*T^1-71978.63*T^2+110.2355*T^3-0.07807297*T^4+2.043615E-5*T^5}; argunit = K; fununit = Pa
      kappa: Piecewise | arg = T; pieces = {4.0, 1330.0, 1.459784E11+4948257.0*T^1-132451.5*T^2+114.0737*T^3+0.02475104*T^4-9.178407E-5*T^5+3.51125E-8*T^6}; argunit = K; fununit = Pa
  mat8: Common "6061 [solid,T6 temper]" on domains 3
    def "Basic"
      thermalconductivity = k_solid_T6_temper_1(T)
      resistivity = res(T)
      thermalexpansioncoefficient = (alpha(T)+(Tempref-293[K])*if(abs(T-Tempref)>1e-3,(alpha(T)-alpha(Tempref))/(T-Tempref),d(alpha(T),T)))/(1+alpha(Tempref)*(Tempref-293[K]))
      heatcapacity = C(T)
      electricconductivity = sigma(T)
      density = rho(T)
      TD = TD(T)
      relpermittivity = 1E9
      k_solid_T6_temper_1: Piecewise
        arg = T
        pieces = 
          {4.0, 130.0, -1.35437+1.660905*T^1-0.008948206*T^2+2.250241E-5*T^3}
          {130.0, 300.0, 30.71577+0.8750948*T^1-0.002142331*T^2+2.05104E-6*T^3}
          {300.0, 811.0, 79.478+0.3355001*T^1-2.701638E-4*T^2}
        argunit = K
        fununit = W/(m*K)
      res: Piecewise
        arg = T
        pieces = 
          {4.0, 19.7, 1.379978E-8+2.555911E-12*T^1}
          {19.7, 293.0, 1.390705E-8-1.842119E-11*T^1+8.191974E-13*T^2-1.50061E-15*T^3}
        argunit = K
        fununit = ohm*m
      alpha: Piecewise
        arg = T
        pieces = 
          {22.0, 88.0, 1.3648E-5+5.61487E-8*T^1+7.71396E-11*T^2-9.540526E-13*T^3}
          {88.0, 588.0, 1.316461E-5+8.302515E-8*T^1-2.909984E-10*T^2+4.99184E-13*T^3-3.127291E-16*T^4}
        argunit = K
        fununit = 1/K
      C: Piecewise
        arg = T
        pieces = 
          {4.0, 30.0, -1.17115557+0.487569051*T^1-0.0443149197*T^2+0.00232206728*T^3-3.42445087E-6*T^4}
          {30.0, 47.0, 26.582634-1.95690617*T^1+0.00352123139*T^2+0.00324321212*T^3-3.10753881E-5*T^4}
          {47.0, 130.0, -75.1821286-1.13922203*T^1+0.176562541*T^2-0.00147785574*T^3+3.9391632E-6*T^4}
          {130.0, 145.0, -264.783185+9.29321629*T^1-0.0121044208*T^2-6.74100976E-5*T^3+1.6547628E-7*T^4}
          {145.0, 811.0, -5.60596587+6.74472515*T^1-0.0153591209*T^2+1.61975861E-5*T^3-6.21481318E-9*T^4}
        argunit = K
        fununit = J/(kg*K)
      sigma: Piecewise
        arg = T
        pieces = 
          {4.0, 19.7, 1/(2.555911E-12*T+1.379978E-08)}
          {19.7, 293.0, 1/(-1.500610E-15*T^3+8.191974E-13*T^2-1.842119E-11*T+1.390705E-08)}
        argunit = K
        fununit = S/m
      rho: Piecewise
        arg = T
        pieces = 
          {22.0, 88.0, 2733.392-0.04347255*T^1+0.001455455*T^2-2.077034E-5*T^3+7.111E-8*T^4}
          {88.0, 588.0, 2736.099-0.009406248*T^1-6.040342E-4*T^2+8.988964E-7*T^3-5.405225E-10*T^4}
        argunit = K
        fununit = kg/m^3
      TD: Piecewise
        arg = T
        pieces = 
          {20.0, 56.0, 0.008936926-8.204512E-4*T^1+3.204977E-5*T^2-6.428844E-7*T^3+6.522072E-9*T^4-2.653113E-11*T^5}
          {56.0, 135.0, 0.001241242-5.079258E-5*T^1+9.0397E-7*T^2-8.106985E-9*T^3+3.617656E-11*T^4-6.389535E-14*T^5}
          {135.0, 355.0, 1.539249E-4-1.724476E-6*T^1+1.312367E-8*T^2-5.122993E-11*T^3+9.965819E-14*T^4-7.622354E-17*T^5}
          {355.0, 588.0, 8.3013E-5-2.384898E-7*T^1+7.399833E-10*T^2-9.130456E-13*T^3+3.753774E-16*T^4}
        argunit = K
        fununit = m^2/s
    ThermalExpansion
      alphatan = CTE(T)
      dL = (dL(T)-dL(Tempref))/(1+dL(Tempref))
      dL: Piecewise
        arg = T
        pieces = 
          {22.0, 88.0, -0.004101768+5.279196E-6*T^1-1.767226E-7*T^2+2.521432E-9*T^3-8.625342E-12*T^4}
          {88.0, 588.0, -0.00440008765+1.079286E-6*T^1+7.353025E-8*T^2-1.076827E-10*T^3+6.512613E-14*T^4}
        argunit = K
      CTE: Piecewise
        arg = T
        pieces = 
          {0.0, 88.0, 1.243641E-8+3.085851E-8*T^1-1.105852E-9*T^2+4.454763E-11*T^3-2.444182E-13*T^4}
          {88.0, 283.0, -2.17214E-5+6.01631E-7*T^1-3.560537E-9*T^2+1.007751E-11*T^3-1.087698E-14*T^4}
          {283.0, 573.16, 1.542521E-5+2.593871E-8*T^1-9.271321E-12*T^2}
        argunit = K
        fununit = 1/K
    Enu "Young's modulus and Poisson's ratio"
      E = E(T)
      nu = nu(T)
      E: Piecewise | arg = T; pieces = {0.0, 773.0, 7.659324E10+2007396.0*T^1-186458.4*T^2+419.2175*T^3-0.3495083*T^4}; argunit = K; fununit = Pa
      nu: Piecewise | arg = T; pieces = {0.0, 773.0, 0.3238668+3.754548E-6*T^1+2.213647E-7*T^2-6.565023E-10*T^3+4.21277E-13*T^4+3.170505E-16*T^5}; argunit = K
    KG "Bulk modulus and shear modulus"
      K = kappa(T)
      G = mu(T)
      mu: Piecewise | arg = T; pieces = {0.0, 773.0, 2.894653E10-120032.4*T^1-69037.36*T^2+158.6722*T^3-0.1348974*T^4}; argunit = K; fununit = Pa
      kappa: Piecewise | arg = T; pieces = {0.0, 773.0, 7.252413E10+1872882.0*T^1-71106.44*T^2+52.7109*T^3}; argunit = K; fununit = Pa
  mat9: Common "FP-Alumina / 45 vol% SiC CVI [solid]" on domains 8
    def "Basic"
      thermalexpansioncoefficient = (alpha(T)+(Tempref-293[K])*if(abs(T-Tempref)>1e-3,(alpha(T)-alpha(Tempref))/(T-Tempref),d(alpha(T),T)))/(1+alpha(Tempref)*(Tempref-293[K]))
      density = rho(T)
      relpermittivity = 9
      alpha: Piecewise | arg = T; pieces = {293.0, 1273.16, 1.52468E-6+4.891764E-9*T^1-1.537924E-12*T^2+2.096537E-20*T^3}; argunit = K; fununit = 1/K
      rho: Piecewise | arg = T; pieces = {293.0, 1273.16, 2473.343-8.385713E-4*T^1-3.944878E-5*T^2+1.156141E-8*T^3}; argunit = K; fununit = kg/m^3
    ThermalExpansion
      alphatan = 6.9E-6
      dL = (dL(T)-dL(Tempref))/(1+dL(Tempref))
      dL: Piecewise | arg = T; pieces = {293.0, 1273.16, -4.467348E-4+9.141923E-8*T^1+5.342313E-9*T^2-1.537869E-12*T^3}; argunit = K

Physics
  es: Electrostatics on domains 1-8
    dependent variable V
    ccn1: ChargeConservation (default)
    zc1: ZeroCharge (default)
    init1: init "Initial Values 1" (default)
    gnd1: Ground on boundaries 7, 13, 20-30, 41-44, 51-55, 57, 59, 60
    pot1: ElectricPotential on boundaries 35-38 | V0 = anode

Mesh
  mesh1 "Mesh 1" (physics-controlled)
    size: MeshSizeDefault | hauto = 1

Studies
  std1 "Study 1"
    param: Parametric "Parametric Sweep" | pname = anode; plistarr = 50,100,500,1000,1500,2000
    stat: Stationary

Solver configurations
  sol1 "Solution 1" (study std1)
    v1: Variables "Dependent Variables 1"
    s1: Stationary "Stationary Solver 1"
      p1: Parametric | pname = anode; plistarr = 50,100,500,1000,1500,2000; pcontinuationmode = no
      fc1: FullyCoupled | linsolver = i1
      i1: Iterative | linsolver = cg
        mg1: Multigrid | prefun = amg; coarseningmethod = classic

Datasets
  dset1: Solution | solution = sol1
  cln1: CutLine3D | data = dset1; genpoints = {{0.0246933, 0.0609528, 0.0319781}, {0.0246933, 0.0609528, 0.162026}}

Tables
  tbl1: Table
    z-coordinate (mm) | es.normE/760
    31.9781 | 0
    32.0421 | 0
    32.2214 | 0
    32.5896 | 0
    32.6711 | 0
    32.8059 | 0
    32.9949 | 0
    33.2844 | 0
    33.3937 | 0
    33.4876 | 0
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  tbl2: Table
    z-coordinate (mm) | Electric field norm
    31.9781 | 0
    32.0421 | 0
    32.2214 | 0
    32.5896 | 0
    32.6711 | 0
    32.8059 | 0
    32.9949 | 0
    33.2844 | 0
    33.3937 | 0
    33.4876 | 0
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
Plots
  pg2: PlotGroup3D "Electric Field Norm (es)" | data = dset1
    mslc1: Multislice
      expr = es.normE
      unit = V/cm
      multiplanexmethod = coord
      xcoord = es.CPx
      multiplaneymethod = coord
      ycoord = es.CPy
      multiplanezmethod = coord
      zcoord = es.CPz
    strmsl1: StreamlineMultislice
      expr = {es.Ex, es.Ey, es.Ez}
      multiplanexmethod = coord
      xcoord = es.CPx
      multiplaneymethod = coord
      ycoord = es.CPy
      multiplanezmethod = coord
      zcoord = es.CPz
      udist = 0.02
      col1: Color "Color Expression 1" | expr = es.normE
      filt1: Filter | expr = !isScalingSystemDomain
  pg3: PlotGroup1D "1D Plot Group 3" | data = cln1; ylabel = E (V cm <SUP>-1</SUP> torr <SUP> -1 </SUP>)
    lngr1: LineGraph
      expr = es.normE/760
      unit = V/cm
      title = Normalised electroluminescence threshold for xenon
      xdata = expr
      xdataexpr = z
      legends = {50 V, 100 V, 500 V, 1000 V, 1500 V, 2000 V}